*NODE, NSET=NALL
1,47,0,0
2,46.90725624,2.951154418,0
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*ELEMENT, TYPE=S8R, ELSET=EALL
102,271,452,497,362,984,985,986,987
103,724,759,666,617,988,989,990,991
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*NSET, NSET=EDGE
1,2,3,4,5,6
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*NSET, NSET=CEN
974
*MATERIAL, NAME=PLY
*ELASTIC
8000.0,0.3
*DENSITY
6.8e-10
*SHELL SECTION, ELSET=EALL, MATERIAL=PLY
3.0
*BOUNDARY
EDGE,1,6
*STEP
*STATIC
*DLOAD
EALL,P,0.05
*NODE FILE
U
*EL FILE
S
*NODE PRINT,NSET=CEN
U
*END STEP
