*NODE, NSET=NALL
1,47,0,0
2,46.90725624,2.951154418,0
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*ELEMENT, TYPE=S8R, ELSET=EALL
102,271,452,497,362,984,985,986,987
103,724,759,666,617,988,989,990,991
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*NSET, NSET=EDGE
1,2,3,4,5,6
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*NSET, NSET=CEN
974
*MATERIAL, NAME=PLY
*ELASTIC
8000.0,0.3
*DENSITY
6.8e-10
*SHELL SECTION, ELSET=EALL, MATERIAL=PLY
3.0
*BOUNDARY
EDGE,1,3
*AMPLITUDE, NAME=STEPA
0.,1.,1.,1.
*STEP
*FREQUENCY, STORAGE=YES
20
*END STEP
*STEP, INC=10000
*MODAL DYNAMIC
4.51591e-06,0.00270954
*DLOAD, AMPLITUDE=STEPA
EALL,P,0.05
*NODE PRINT, NSET=CEN, FREQUENCY=1
U
*END STEP
